# OpenSim document version 40000
MarkerSet:
  Marker STRN: torso (0.2017757 0.1901324 -0.002340798)
  Marker RSHO: torso (-0.08577607 0.385926 0.1134728)
  Marker LSHO: torso (-0.06865101 0.3828665 -0.1048374)
  Marker RASI: pelvis (0.04892869 0.04853034 0.1457585)
  Marker LASI: pelvis (0.02781309 0.02890673 -0.1304747)
  Marker S1: pelvis (-0.1912258 0.1070523 0.01364756)
  Marker RTHI: femur_r (0.0641784 -0.1109727 0.003565168) fixed=true
  Marker RKNE: femur_r (-0.05628141 -0.2577372 0.02269303)
  Marker RTIB: tibia_r (-0.02993528 -0.1455867 0.03403094)
  Marker RANK: tibia_r (0.03226791 -0.3571904 0.0485718)
  Marker RHEE: calcn_r (0.02136992 0.08271709 0.05030207)
  Marker RTOE: calcn_r (0.1987936 0.001526359 -0.03705656)
  Marker LTHI: femur_l (0.02153114 -0.1738088 -0.07627925)
  Marker LKNE: femur_l (0.06169254 -0.2840144 -0.06435975)
  Marker LTIB: tibia_l (0.01535914 -0.2095004 -0.03458204)
  Marker LANK: tibia_l (-0.02209642 -0.359247 0.006947829)
  Marker LHEE: calcn_l (0.002595247 0.02521723 -0.04188579)
  Marker LTOE: calcn_l (0.05629126 -0.02624755 0.01301798)
  Marker LBHD: torso (-0.138787 0.5019734 -0.06610476)
  Marker C7: torso (-0.10916 0.3780638 0.003665254)
  Marker T10: torso (-0.09475127 0.1604474 0.007176845)
  Marker CLAV: torso (0.06119253 0.3483125 0.01631303)
  Marker RBHD: torso (-0.1503252 0.4866924 0.05083811)
  Marker RPSI: pelvis (-0.2094719 0.1013915 0.07497299)
  Marker LPSI: pelvis (-0.2072341 0.1129577 -0.04052913) fixed=true
  Marker T5: torso (-0.1203914 0.2655033 0.007067355)
  Marker RBAK: torso (-0.1397443 0.2532029 0.0800498)
  Marker LUPA: torso (-0.0634608 0.2257158 -0.215895)
  Marker LELB: torso (-0.05009693 0.09633257 -0.2358717)
  Marker LFRM: torso (-0.01218279 -0.001874128 -0.3161477)
  Marker LWRA: torso (0.04651689 -0.07329261 -0.3803694)
  Marker LWRB: torso (0.03507389 -0.1062743 -0.3306276)
  Marker LFIN: torso (0.04775314 -0.1378884 -0.4219217)
  Marker LFHD: torso (0.006085623 0.5573987 -0.05081274)
  Marker RFHD: torso (-0.001224115 0.5544426 0.07858178)
  Marker RUPA: torso (-0.05487841 0.2335946 0.2371606)
  Marker RELB: torso (-0.05075036 0.116512 0.2627035)
  Marker RFRM: torso (-0.008703149 0.02006774 0.3417123)
  Marker RWRA: torso (0.06163043 -0.05444587 0.4110695)
  Marker RWRB: torso (0.03343303 -0.08784117 0.3735746)
  Marker RFIN: torso (0.05647564 -0.1196303 0.4618032)
