# OpenSim document version 40000
ScaleTool 3DGaitModel2392-scaled:
  mass: 65 [kg]
  height: -1
  age: -1
  GenericModelMaker:
    marker_set_file: gait2392_Scale_MarkerSetV2.xml
  ModelScaler:
    apply: true
    scaling_order: measurements
    marker_file: C:/Users/win10/Desktop/Gait2392_Simbody/../kamar/static.trc
    time_range: -0.00166667 4.00667
    preserve_mass_distribution: true
    MeasurementSet:
      Measurement pelv: apply=true
        MarkerPair: markers=(LASI RASI)
        BodyScale pelvis: axes=Z
      Measurement pelv2: apply=true
        MarkerPair: markers=(LPSI RPSI)
        BodyScale pelvis: axes=(X Y)
      Measurement torso1: apply=true
        MarkerPair: markers=(LSHO RSHO)
        BodyScale torso: axes=(X Y Z)
      Measurement torso2: apply=false
        MarkerPair: markers=(S1 C7)
      Measurement feml: apply=true
        MarkerPair: markers=(LASI LKNE)
        BodyScale femur_l: axes=(X Y Z)
      Measurement femr: apply=true
        MarkerPair: markers=(RASI RKNE)
        BodyScale femur_r: axes=(X Y Z)
      Measurement tibial: apply=true
        MarkerPair: markers=(LTIB LANK)
        BodyScale tibia_l: axes=(X Y Z)
      Measurement tibiar: apply=true
        MarkerPair: markers=(RTIB RANK)
        BodyScale tibia_r: axes=(X Y Z)
      Measurement calcnr: apply=true
        MarkerPair: markers=(RANK RHEE)
        BodyScale calcn_r: axes=(X Y Z)
      Measurement calcf: apply=true
        MarkerPair: markers=(LHEE LANK)
        BodyScale calcn_l: axes=(X Y Z)
      Measurement toesr: apply=true
        MarkerPair: markers=(RTOE RHEE)
        BodyScale toes_r: axes=(X Y Z)
      Measurement toesl: apply=true
        MarkerPair: markers=(LTOE LHEE)
        BodyScale toes_l: axes=(X Y Z)
      Measurement talusr: apply=true
        MarkerPair: markers=(RANK RTIB)
        BodyScale talus_r: axes=(X Y Z)
      Measurement talusl: apply=true
        MarkerPair: markers=(LANK LTIB)
        BodyScale talus_l: axes=(X Y Z)
  MarkerPlacer:
    apply: true
    marker_file: C:/Users/win10/Desktop/Gait2392_Simbody/../kamar/gait13.trc
    time_range: -0.00166667 4.00667
    max_marker_movement: -1
    IKTaskSet:
      IKMarkerTask STRN: apply=true weight=10
      IKMarkerTask RSHO: apply=true weight=1
      IKMarkerTask LSHO: apply=true weight=1
      IKMarkerTask RASI: apply=true weight=10
      IKMarkerTask LASI: apply=true weight=10
      IKMarkerTask S1: apply=true weight=1
      IKMarkerTask RTHI: apply=false weight=1
      IKMarkerTask RKNE: apply=true weight=10
      IKMarkerTask RTIB: apply=true weight=1
      IKMarkerTask RANK: apply=true weight=10
      IKMarkerTask RHEE: apply=true weight=10
      IKMarkerTask RTOE: apply=true weight=10
      IKMarkerTask LTHI: apply=false weight=1
      IKMarkerTask LKNE: apply=true weight=10
      IKMarkerTask LTIB: apply=true weight=1
      IKMarkerTask LANK: apply=true weight=10
      IKMarkerTask LHEE: apply=true weight=10
      IKMarkerTask LTOE: apply=true weight=10
      IKMarkerTask LBHD: apply=true weight=1
      IKMarkerTask C7: apply=true weight=1
      IKMarkerTask T10: apply=true weight=1
      IKMarkerTask CLAV: apply=true weight=1
      IKMarkerTask RBHD: apply=true weight=1
      IKMarkerTask RPSI: apply=true weight=10
      IKMarkerTask LPSI: apply=true weight=10
      IKMarkerTask T5: apply=true weight=1
      IKMarkerTask RBAK: apply=true weight=1
      IKMarkerTask LUPA: apply=false weight=1
      IKMarkerTask LELB: apply=false weight=1
      IKMarkerTask LFRM: apply=false weight=1
      IKMarkerTask LWRA: apply=false weight=1
      IKMarkerTask LWRB: apply=false weight=1
      IKMarkerTask LFIN: apply=false weight=1
      IKMarkerTask LFHD: apply=false weight=1
      IKMarkerTask RFHD: apply=false weight=1
      IKMarkerTask RUPA: apply=false weight=1
      IKMarkerTask RELB: apply=false weight=1
      IKMarkerTask RFRM: apply=false weight=1
      IKMarkerTask RWRA: apply=false weight=1
      IKMarkerTask RWRB: apply=false weight=1
      IKMarkerTask RFIN: apply=false weight=1
