# OpenSim document version 40000
InverseKinematicsTool:
  results_directory: ./
  constraint_weight: Inf
  accuracy: 1e-5
  marker_file: C:/Users/win10/Desktop/Gait2392_Simbody/../kamar/gait13.trc
  time_range: -0.00166667 7.27333
  report_errors: true
  output_motion_file: subject01_walk1_grf.mot
  report_marker_locations: false
  IKTaskSet:
    IKMarkerTask STRN: apply=true weight=10
    IKMarkerTask RSHO: apply=true weight=1
    IKMarkerTask LSHO: apply=true weight=1
    IKMarkerTask RASI: apply=true weight=10
    IKMarkerTask LASI: apply=true weight=10
    IKMarkerTask S1: apply=true weight=10
    IKMarkerTask RTHI: apply=true weight=1
    IKMarkerTask RKNE: apply=true weight=10
    IKMarkerTask RTIB: apply=true weight=1
    IKMarkerTask RANK: apply=true weight=10
    IKMarkerTask RHEE: apply=true weight=10
    IKMarkerTask RTOE: apply=true weight=10
    IKMarkerTask LTHI: apply=true weight=1
    IKMarkerTask LKNE: apply=true weight=10
    IKMarkerTask LTIB: apply=true weight=1
    IKMarkerTask LANK: apply=true weight=10
    IKMarkerTask LHEE: apply=true weight=10
    IKMarkerTask LTOE: apply=true weight=10
    IKMarkerTask LBHD: apply=false weight=1
    IKMarkerTask C7: apply=true weight=1
    IKMarkerTask T10: apply=true weight=1
    IKMarkerTask CLAV: apply=true weight=1
    IKMarkerTask RBHD: apply=false weight=1
    IKMarkerTask RPSI: apply=true weight=10
    IKMarkerTask LPSI: apply=true weight=10
    IKMarkerTask T5: apply=true weight=1
    IKMarkerTask RBAK: apply=true weight=1
    IKMarkerTask LUPA: apply=false weight=1
    IKMarkerTask LELB: apply=false weight=1
    IKMarkerTask LFRM: apply=false weight=1
    IKMarkerTask LWRA: apply=false weight=1
    IKMarkerTask LWRB: apply=false weight=1
    IKMarkerTask LFIN: apply=false weight=1
    IKMarkerTask LFHD: apply=false weight=1
    IKMarkerTask RFHD: apply=false weight=1
    IKMarkerTask RUPA: apply=false weight=1
    IKMarkerTask RELB: apply=false weight=1
    IKMarkerTask RFRM: apply=false weight=1
    IKMarkerTask RWRA: apply=false weight=1
    IKMarkerTask RWRB: apply=false weight=1
    IKMarkerTask RFIN: apply=false weight=1
